// SBML level 3 version 1

model kkit_objects_example()
  // model units - substance: substance, time: second, extent: substance

  // Compartments:
  compartment kinetics_463_0_ = 1.666667e-18 volume;

  // Species:
  substanceOnly species B_469_0_ in kinetics_463_0_ = 0;
  substanceOnly species A_471_0_ in kinetics_463_0_ = 2.0073805;
  substanceOnly species $tot1_473_0_ in kinetics_463_0_;
  substanceOnly species C_475_0_ in kinetics_463_0_ = 0;
  substanceOnly species $D_479_0_ in kinetics_463_0_ = 1.00369025;
  substanceOnly species E_485_0_ in kinetics_463_0_ = 0;
  substanceOnly species MassActionEnz_487_0_ in kinetics_463_0_ = 1.00369025;
  substanceOnly species e1_cplx_490_0_ in kinetics_463_0_ = 0; e1_cplx_490_0_ is "MassActionEnz_e1_e1_cplx";
  substanceOnly species MM_Enz_492_0_ in kinetics_463_0_ = 1.00369025;
  substanceOnly species F_496_0_ in kinetics_463_0_ = 0;

  // Assignment rules:
  tot1_473_0_ := A_471_0_ + B_469_0_;

  // Reactions:
  Reac1_481_0_: A_471_0_ + $D_479_0_ -> B_469_0_; Reac1_481_0__Kf*A_471_0_*D_479_0_ - Reac1_481_0__Kb*B_469_0_;
    Reac1_481_0__Kf = 0.1992647 per_item_per_second; Reac1_481_0__Kb = 0.1 per_second;
  Reac2_483_0_: 2 B_469_0_ => C_475_0_; Reac2_483_0__Kf*B_469_0_^2;
    Reac2_483_0__Kf = 0.09963233 per_item_per_second;
  e1_489_0_Complex_formation_: MassActionEnz_487_0_ + C_475_0_ -> e1_cplx_490_0_; k1*MassActionEnz_487_0_*C_475_0_ - k2*e1_cplx_490_0_;
    k1 = 0.9963233 per_item_per_second; k2 = 4 per_second;
  e1_489_0_Product_formation_: e1_cplx_490_0_ => MassActionEnz_487_0_ + E_485_0_; k3*e1_cplx_490_0_;
    k3 = 1 per_second;
  // kcat*E_485_0_*MM_Enz_492_0_/(Km +E_485_0_)
  e2_494_0__MM_Reaction_: E_485_0_ => F_496_0_; kcat*E_485_0_*MM_Enz_492_0_/(Km + E_485_0_);  // modifiers: MM_Enz_492_0_
    Km = 5.01845125 substance; kcat = 1 per_second;

  // Unit definitions:
  unit volume = litre;
  unit substance = item;
  unit per_item_per_second = 1 / (item * second);
  unit per_second = 1 / second;
end
